# OpenSim document version 40500
InverseKinematicsTool:
  time_range: 0 5.68
  output_motion_file: IK_test.mot
  marker_file: 00003_markers.trc
  IKTaskSet:
    IKMarkerTask RSHO: apply=true weight=1
    IKMarkerTask LSHO: apply=true weight=1
    IKMarkerTask C7: apply=true weight=1
    IKMarkerTask CLAV: apply=true weight=1
    IKMarkerTask RASI: apply=true weight=1
    IKMarkerTask LASI: apply=true weight=1
    IKMarkerTask RPSI: apply=true weight=1
    IKMarkerTask LPSI: apply=true weight=1
    IKMarkerTask RTHI: apply=true weight=1
    IKMarkerTask RKNE: apply=true weight=1
    IKMarkerTask RTIP: apply=true weight=1
    IKMarkerTask RANK: apply=true weight=1
    IKMarkerTask RHEE: apply=true weight=1
    IKMarkerTask RMT1: apply=true weight=1
    IKMarkerTask RMT5: apply=true weight=1
    IKMarkerTask LTHI: apply=true weight=1
    IKMarkerTask LKNE: apply=true weight=1
    IKMarkerTask LTIP: apply=true weight=1
    IKMarkerTask LANK: apply=true weight=1
    IKMarkerTask LHEE: apply=true weight=1
    IKMarkerTask LMT1: apply=true weight=1
    IKMarkerTask LMT5: apply=true weight=1
