# OpenSim document version 40500
ScaleTool H2190-scaled:
  mass: 74.5314 [kg]
  height: -1
  age: -1
  ModelScaler:
    apply: true
    scaling_order: measurements
    marker_file: /Users/itak/Documents/Research/Walk-IL/dataset/scale_settings/../trc/00317_00011.trc
    time_range: 0 0.1
    preserve_mass_distribution: true
    MeasurementSet:
      Measurement pelvis: apply=true
        MarkerPair: markers=(RASI LASI)
        MarkerPair: markers=(RASI RPSI)
        BodyScale pelvis: axes=(X Y Z)
      Measurement thigh: apply=true
        MarkerPair: markers=(RASI RKNE)
        MarkerPair: markers=(LASI LKNE)
        BodyScale femur_r: axes=(X Y Z)
        BodyScale femur_l: axes=(X Y Z)
      Measurement shank: apply=true
        MarkerPair: markers=(RKNE RANK)
        MarkerPair: markers=(LKNE LANK)
        BodyScale tibia_r: axes=(X Y Z)
        BodyScale tibia_l: axes=(X Y Z)
      Measurement foot: apply=true
        MarkerPair: markers=(LHEE LMT1)
        MarkerPair: markers=(RHEE RMT1)
        MarkerPair: markers=(LANK LMT5)
        MarkerPair: markers=(RANK RMT5)
        BodyScale calcn_r: axes=(X Y Z)
        BodyScale calcn_l: axes=(X Y Z)
      Measurement torso: apply=true
        MarkerPair: markers=(CLAV RASI)
        MarkerPair: markers=(LASI CLAV)
        MarkerPair: markers=(RASI C7)
        BodyScale torso: axes=(X Y Z)
  MarkerPlacer:
    apply: true
    marker_file: /Users/itak/Documents/Research/Walk-IL/dataset/scale_settings/../trc/00317_00011.trc
    time_range: 0 0.1
    max_marker_movement: -1
    IKTaskSet:
      IKMarkerTask RSHO: apply=true weight=1
      IKMarkerTask LSHO: apply=true weight=1
      IKMarkerTask C7: apply=true weight=25
      IKMarkerTask CLAV: apply=true weight=25
      IKMarkerTask RASI: apply=true weight=25
      IKMarkerTask LASI: apply=true weight=25
      IKMarkerTask RPSI: apply=true weight=1
      IKMarkerTask LPSI: apply=true weight=1
      IKMarkerTask RTHI: apply=true weight=1
      IKMarkerTask RKNE: apply=true weight=15
      IKMarkerTask RTIP: apply=true weight=1
      IKMarkerTask RANK: apply=true weight=15
      IKMarkerTask RHEE: apply=true weight=1
      IKMarkerTask RMT1: apply=true weight=1
      IKMarkerTask RMT5: apply=true weight=1
      IKMarkerTask LTHI: apply=true weight=1
      IKMarkerTask LKNE: apply=true weight=15
      IKMarkerTask LTIP: apply=true weight=1
      IKMarkerTask LANK: apply=true weight=15
      IKMarkerTask LHEE: apply=true weight=1
      IKMarkerTask LMT1: apply=true weight=1
      IKMarkerTask LMT5: apply=true weight=1
