# OpenSim document version 40500
AnalyzeTool 00130:
  model_file: ../../models/H2190_kit.osim
  replace_force_set: false
  results_directory: .
  output_precision: 8
  initial_time: 0.01
  final_time: 7.43
  solve_for_equilibrium_for_auxiliary_states: false
  maximum_number_of_integrator_steps: 20000
  maximum_integrator_step_size: 1
  minimum_integrator_step_size: 1e-8
  integrator_error_tolerance: 1e-5
  coordinates_file: ../mot/00130.mot
  lowpass_cutoff_frequency_for_coordinates: -1
  AnalysisSet Analyses:
    BodyKinematics: start_time=0.01 end_time=7.43 step_interval=1 in_degrees=true
        bodies=(center_of_mass calcn_r calcn_l) express_results_in_body_local_frame=false
