# OpenSim document version 40500
Model H2190-scaled:
  gravity: 0 -9.80665 0
  length_units: meters
  force_units: N
  credits:
    Model with 21 degrees-of-freedom and 90 muscles. Developed by Thomas Geijtenbeek for use in predictive simulations. Latest revision: 2023-03-06. Base model adapted from Delp1992. Hamstrings parameters adapted from Arnold2010. Quadriceps parameters derived from Arnold2010 and Rajagopal2016. Upper body muscles derived from Christopy2011.
  publications:
    Geijtenbeek, T.: SCONE: Open Source Software for Biological Motion, Journal of Open Source Software 4(38), 2019. Delp, S.L., Loan, J.P., Hoy, M.G., Zajac, F.E., Topp E.L., Rosen, J.M.: An interactive graphics-based model of the lower extremity to study orthopaedic surgical procedures, IEEE Transactions on Biomedical Engineering, vol. 37, pp. 757-767, 1990. Yamaguchi G.T., Zajac F.E.: A planar model of the knee joint to characterize the knee extensor mechanism." J . Biomech. vol. 22. pp. 1-10. 1989. Anderson F.C., Pandy M.G.: A dynamic optimization solution for vertical jumping in three dimensions. Computer Methods in Biomechanics and Biomedical Engineering 2:201-231, 1999. Anderson F.C., Pandy M.G.: Dynamic optimization of human walking. Journal of Biomechanical Engineering 123:381-390, 2001.
  Ground
  BodySet:
    Body pelvis: mass=11.777 [kg] mass_center=(-0.0738105 0 0) inertia=(0.1120445 0.09493265 0.06310678 0 0 0)
        meshes=(sacrum.vtp pelvis.vtp l_pelvis.vtp)
    Body femur_r: mass=9.3014 mass_center=(0 -0.1617656 0) inertia=(0.1212425 0.03178202 0.1278525 0 0 0)
        meshes=femur.vtp
    Body tibia_r: mass=3.7075 mass_center=(0 -0.2068753 0) inertia=(0.06188128 0.006261797 0.06274075 0 0 0)
        meshes=(tibia.vtp fibula.vtp)
    Body calcn_r: mass=1.25 mass_center=(0.08932318 0.02679695 0) inertia=(0.001117008 0.003111666 0.003271238 0 0 0)
        meshes=(talus.vtp bofoot.vtp foot.vtp)
    Body femur_l: mass=9.3014 mass_center=(0 -0.1617656 0) inertia=(0.1212425 0.03178202 0.1278525 0 0 0)
        meshes=l_femur.vtp
    Body tibia_l: mass=3.7075 mass_center=(0 -0.2068753 0) inertia=(0.06188128 0.006261797 0.06274075 0 0 0)
        meshes=(l_tibia.vtp l_fibula.vtp)
    Body calcn_l: mass=1.25 mass_center=(0.08932318 0.02679695 0) inertia=(0.001117008 0.003111666 0.003271238 0 0 0)
        meshes=(l_talus.vtp l_bofoot.vtp l_foot.vtp)
    Body torso: mass=34.2366 mass_center=(-0.02910941 0.3105003 0) inertia=(1.388254 0.7113096 1.347675 0 0 0)
        meshes=(hat_spine.vtp hat_jaw.vtp hat_skull.vtp hat_ribs.vtp)
  JointSet:
    CustomJoint ground_pelvis: socket_parent_frame=ground_offset socket_child_frame=pelvis_offset
      Coordinate pelvis_tilt: default_value=0 range=(-5 5) clamped=false
      Coordinate pelvis_list: default_value=0 range=(-5 5) clamped=false
      Coordinate pelvis_rotation: default_value=0 range=(-5 5) clamped=false
      Coordinate pelvis_tx: default_value=0 range=(-100 100) clamped=false
      Coordinate pelvis_ty: default_value=1 range=(-1 2) clamped=false
      Coordinate pelvis_tz: default_value=0 range=(-100 100) clamped=false
      PhysicalOffsetFrame ground_offset: socket_parent=/ground translation=(0 0 0) [meters]
      PhysicalOffsetFrame pelvis_offset: socket_parent=/bodyset/pelvis translation=(0 0 0)
      SpatialTransform:
        TransformAxis rotation1: coordinates=pelvis_tilt axis=(0 0 1) LinearFunction(coefficients=1 0)
        TransformAxis rotation2: coordinates=pelvis_list axis=(1 0 0) LinearFunction(coefficients=1 0)
        TransformAxis rotation3: coordinates=pelvis_rotation axis=(0 1 0) LinearFunction(coefficients=1 0)
        TransformAxis translation1: coordinates=pelvis_tx axis=(1 0 0) LinearFunction(coefficients=1 0)
        TransformAxis translation2: coordinates=pelvis_ty axis=(0 1 0) LinearFunction(coefficients=1 0)
        TransformAxis translation3: coordinates=pelvis_tz axis=(0 0 1) LinearFunction(coefficients=1 0)
    CustomJoint hip_r: socket_parent_frame=pelvis_offset socket_child_frame=femur_r_offset
      Coordinate hip_flexion_r: default_value=0 range=(-0.5235988 2.094395) clamped=false
      Coordinate hip_adduction_r: default_value=0 range=(-0.7853982 0.5235988) clamped=false
      Coordinate hip_rotation_r: default_value=0 range=(-0.8726646 0.6981317) clamped=false
      PhysicalOffsetFrame pelvis_offset: socket_parent=/bodyset/pelvis translation=(-0.0738105 -0.06900812 0.08717364)
      PhysicalOffsetFrame femur_r_offset: socket_parent=/bodyset/femur_r translation=(0 0 0)
      SpatialTransform: axes_held_at_zero=(translation1 translation2 translation3)
        TransformAxis rotation1: coordinates=hip_flexion_r axis=(0 0 1) LinearFunction(coefficients=1 0)
        TransformAxis rotation2: coordinates=hip_adduction_r axis=(1 0 0) LinearFunction(coefficients=1 0)
        TransformAxis rotation3: coordinates=hip_rotation_r axis=(0 1 0) LinearFunction(coefficients=1 0)
    PinJoint knee_r: socket_parent_frame=femur_r_offset socket_child_frame=tibia_r_offset
      Coordinate knee_angle_r: default_value=0 range=(-2.094395 0) clamped=false
      PhysicalOffsetFrame femur_r_offset: socket_parent=/bodyset/femur_r translation=(0 -0.3768186 0)
      PhysicalOffsetFrame tibia_r_offset: socket_parent=/bodyset/tibia_r translation=(0 0 0)
    CustomJoint ankle_r: socket_parent_frame=tibia_r_offset socket_child_frame=calcn_r_offset
      Coordinate ankle_angle_r: default_value=0 range=(-1.047198 0.4363323) clamped=false
      Coordinate subtalar_angle_r: default_value=0 range=(-0.1745329 0.5235988) clamped=false
      PhysicalOffsetFrame tibia_r_offset: socket_parent=/bodyset/tibia_r translation=(0 -0.476467 0)
      PhysicalOffsetFrame calcn_r_offset: socket_parent=/bodyset/calcn_r
          translation=(0.04356291 0.03747107 -0.007074396)
      SpatialTransform: axes_held_at_zero=(rotation3 translation1 translation2 translation3)
        TransformAxis rotation1: coordinates=ankle_angle_r axis=(0 0 1) LinearFunction(coefficients=1 0)
        TransformAxis rotation2: coordinates=subtalar_angle_r axis=(1 0 0) LinearFunction(coefficients=1 0)
    CustomJoint hip_l: socket_parent_frame=pelvis_offset socket_child_frame=femur_l_offset
      Coordinate hip_flexion_l: default_value=0 range=(-0.5235988 2.094395) clamped=false
      Coordinate hip_adduction_l: default_value=0 range=(-0.7853982 0.5235988) clamped=false
      Coordinate hip_rotation_l: default_value=0 range=(-0.8726646 0.6981317) clamped=false
      PhysicalOffsetFrame pelvis_offset: socket_parent=/bodyset/pelvis translation=(-0.0738105 -0.06900812 -0.08717364)
      PhysicalOffsetFrame femur_l_offset: socket_parent=/bodyset/femur_l translation=(0 0 0)
      SpatialTransform: axes_held_at_zero=(translation1 translation2 translation3)
        TransformAxis rotation1: coordinates=hip_flexion_l axis=(0 0 1) LinearFunction(coefficients=1 0)
        TransformAxis rotation2: coordinates=hip_adduction_l axis=(-1 0 0) LinearFunction(coefficients=1 0)
        TransformAxis rotation3: coordinates=hip_rotation_l axis=(0 -1 0) LinearFunction(coefficients=1 0)
    PinJoint knee_l: socket_parent_frame=femur_l_offset socket_child_frame=tibia_l_offset
      Coordinate knee_angle_l: default_value=0 range=(-2.094395 0) clamped=false
      PhysicalOffsetFrame femur_l_offset: socket_parent=/bodyset/femur_l translation=(0 -0.3768186 0)
      PhysicalOffsetFrame tibia_l_offset: socket_parent=/bodyset/tibia_l translation=(0 0 0)
    CustomJoint ankle_l: socket_parent_frame=tibia_l_offset socket_child_frame=calcn_l_offset
      Coordinate ankle_angle_l: default_value=0 range=(-1.047198 0.4363323) clamped=false
      Coordinate subtalar_angle_l: default_value=0 range=(-0.1745329 0.5235988) clamped=false
      PhysicalOffsetFrame tibia_l_offset: socket_parent=/bodyset/tibia_l translation=(0 -0.476467 0)
      PhysicalOffsetFrame calcn_l_offset: socket_parent=/bodyset/calcn_l
          translation=(0.04356291 0.03747107 0.007074396)
      SpatialTransform: axes_held_at_zero=(rotation3 translation1 translation2 translation3)
        TransformAxis rotation1: coordinates=ankle_angle_l axis=(0 0 1) LinearFunction(coefficients=1 0)
        TransformAxis rotation2: coordinates=subtalar_angle_l axis=(-1 0 0) LinearFunction(coefficients=1 0)
    CustomJoint lumbar_joint: socket_parent_frame=pelvis_offset socket_child_frame=torso_offset
      Coordinate lumbar_extension: default_value=0 range=(-5 5) clamped=false
      Coordinate lumbar_bending: default_value=0 range=(-5 5) clamped=false
      Coordinate lumbar_rotation: default_value=0 range=(-5 5) clamped=false
      PhysicalOffsetFrame pelvis_offset: socket_parent=/bodyset/pelvis translation=(-0.1051304 0.08508565 0)
      PhysicalOffsetFrame torso_offset: socket_parent=/bodyset/torso translation=(0 0 0)
      SpatialTransform: axes_held_at_zero=(translation1 translation2 translation3)
        TransformAxis rotation1: coordinates=lumbar_extension axis=(0 0 1) LinearFunction(coefficients=1 0)
        TransformAxis rotation2: coordinates=lumbar_bending axis=(1 0 0) LinearFunction(coefficients=1 0)
        TransformAxis rotation3: coordinates=lumbar_rotation axis=(0 1 0) LinearFunction(coefficients=1 0)
  ForceSet:
    Millard2012EquilibriumMuscle [values shared by the 90 below unless stated]:
      ActiveForceLengthCurve: minimum_value=0
      ForceVelocityCurve: concentric_slope_at_vmax=0 concentric_slope_near_vmax=0.25 isometric_slope=5
          eccentric_slope_at_vmax=0 eccentric_slope_near_vmax=0.15 max_eccentric_velocity_force_multiplier=1.4
      FiberForceLengthCurve
      TendonForceLengthCurve
    Millard2012EquilibriumMuscle glut_med1_r: optimal_force=1 max_isometric_force=819 optimal_fiber_length=0.07502025
        tendon_slack_length=0.05710955 pennation_angle_at_optimal=0.3578 [radians] max_contraction_velocity=10
        minimum_activation=0.01
      PathPoint P1: pelvis (-0.04259503 0.03173747 0.1262191)
      PathPoint P2: femur_r (-0.02074406 -0.01113328 0.0528117)
    Millard2012EquilibriumMuscle glut_med2_r: optimal_force=1 max_isometric_force=573 optimal_fiber_length=0.07495644
        tendon_slack_length=0.06667339 pennation_angle_at_optimal=0.3578 max_contraction_velocity=10
        minimum_activation=0.01
      PathPoint P1: pelvis (-0.08926163 0.04645781 0.07997007)
      PathPoint P2: femur_r (-0.02455031 -0.005519061 0.05014733)
    Millard2012EquilibriumMuscle glut_med3_r: optimal_force=1 max_isometric_force=653 optimal_fiber_length=0.07467887
        tendon_slack_length=0.04605027 pennation_angle_at_optimal=0.3578 max_contraction_velocity=10
        minimum_activation=0.01
      PathPoint P1: pelvis (-0.1276807 0.01096196 0.06765092)
      PathPoint P2: femur_r (-0.02940327 -0.004472343 0.04929092)
    Millard2012EquilibriumMuscle glut_min1_r: optimal_force=1 max_isometric_force=270 optimal_fiber_length=0.0684662
        tendon_slack_length=0.01610969 pennation_angle_at_optimal=0.1745 max_contraction_velocity=10
        minimum_activation=0.01
      PathPoint P1: pelvis (-0.0487546 -0.008351966 0.1102459)
      PathPoint P2: femur_r (-0.006851248 -0.009896247 0.05328749)
    Millard2012EquilibriumMuscle glut_min2_r: optimal_force=1 max_isometric_force=285 optimal_fiber_length=0.05613639
        tendon_slack_length=0.02606332 pennation_angle_at_optimal=0 max_contraction_velocity=10 minimum_activation=0.01
      PathPoint P1: pelvis (-0.06608493 -0.006785972 0.10346)
      PathPoint P2: femur_r (-0.009134998 -0.009896247 0.05328749)
    Millard2012EquilibriumMuscle glut_min3_r: optimal_force=1 max_isometric_force=323 optimal_fiber_length=0.03806137
        tendon_slack_length=0.04807752 pennation_angle_at_optimal=0.0175 max_contraction_velocity=10
        minimum_activation=0.01
      PathPoint P1: pelvis (-0.08706924 -0.006577173 0.08936603)
      PathPoint P2: femur_r (-0.01284609 -0.007897967 0.05233592)
    Millard2012EquilibriumMuscle semimem_r: optimal_force=1 max_isometric_force=1288 optimal_fiber_length=0.06600365
        tendon_slack_length=0.3204525 pennation_angle_at_optimal=0.2635 max_contraction_velocity=10
        activation_time_constant=0.01 [seconds] deactivation_time_constant=0.04 [seconds] minimum_activation=0.01
      PathPoint P1: pelvis (-0.1244443 -0.1017583 0.07465613)
      PathPoint P3: tibia_r (-0.03324189 -0.03434995 -0.02216126)
    Millard2012EquilibriumMuscle semiten_r: optimal_force=1 max_isometric_force=410 optimal_fiber_length=0.1889446
        tendon_slack_length=0.2496419 pennation_angle_at_optimal=0.2251 max_contraction_velocity=10
        activation_time_constant=0.01 deactivation_time_constant=0.04 minimum_activation=0.01
      PathPoint P1: pelvis (-0.1319089 -0.1147142 0.0630469)
      PathPoint P3: tibia_r (-0.03656607 -0.04210639 -0.02548545)
      PathPoint P4: tibia_r (-0.01252111 -0.08266149 -0.02714754)
      PathPoint P5: tibia_r (0.00299177 -0.1059308 -0.02138561)
    Millard2012EquilibriumMuscle bifemlh_r: optimal_force=1 max_isometric_force=896 optimal_fiber_length=0.09382123
        tendon_slack_length=0.3066493 pennation_angle_at_optimal=0.2025 max_contraction_velocity=10
        minimum_activation=0.01
      PathPoint P1: pelvis (-0.1315017 -0.1070826 0.07249506)
      PathPoint P2: tibia_r (-0.03102576 -0.02216126 0.03261029)
      PathPoint P3: tibia_r (-0.02326932 -0.04432251 0.03800656)
    Millard2012EquilibriumMuscle bifemsh_r: optimal_force=1 max_isometric_force=804 optimal_fiber_length=0.1085198
        tendon_slack_length=0.09346674 pennation_angle_at_optimal=0.2147 max_contraction_velocity=10
        minimum_activation=0.01
      PathPoint P1: femur_r (0.004757811 -0.2008748 0.02226656)
      PathPoint P2: tibia_r (-0.03102576 -0.02216126 0.03261029)
      PathPoint P3: tibia_r (-0.02326932 -0.04432251 0.03800656)
    Millard2012EquilibriumMuscle sar_r: optimal_force=1 max_isometric_force=156 optimal_fiber_length=0.3993595
        tendon_slack_length=0.1348705 pennation_angle_at_optimal=0.0227 max_contraction_velocity=10
        activation_time_constant=0.01 deactivation_time_constant=0.04 minimum_activation=0.01
      PathPoint P1: pelvis (-0.01597313 -0.001357194 0.1296643)
      PathPoint P2: femur_r (-0.002854687 -0.3395174 -0.04006077)
      PathPoint P3: tibia_r (-0.006205152 -0.04642783 -0.04421171)
      PathPoint P4: tibia_r (0.006648377 -0.0652649 -0.04243881)
      PathPoint P5: tibia_r (0.02692593 -0.09307728 -0.02792318)
    Millard2012EquilibriumMuscle add_long_r: optimal_force=1 max_isometric_force=627 optimal_fiber_length=0.1038631
        tendon_slack_length=0.1017513 pennation_angle_at_optimal=0.1239 max_contraction_velocity=10
        minimum_activation=0.01
      PathPoint P1: pelvis (-0.03299026 -0.08727804 0.01764353)
      PathPoint P2: femur_r (0.004757811 -0.2008748 0.02226656)
    Millard2012EquilibriumMuscle add_brev_r: optimal_force=1 max_isometric_force=429 optimal_fiber_length=0.1004071
        tendon_slack_length=0.03408583 pennation_angle_at_optimal=0.1065 max_contraction_velocity=10
        minimum_activation=0.01
      PathPoint P1: pelvis (-0.06128255 -0.09552561 0.01712153)
      PathPoint P2: femur_r (0.000856406 -0.1138068 0.02797593)
    Millard2012EquilibriumMuscle add_mag1_r: optimal_force=1 max_isometric_force=432 optimal_fiber_length=0.1226294
        tendon_slack_length=0.02993316 pennation_angle_at_optimal=0.322 max_contraction_velocity=10
        minimum_activation=0.01
      PathPoint P1: pelvis (-0.07642049 -0.1225651 0.02662189)
      PathPoint P2: femur_r (-0.00428203 -0.1152342 0.03225796)
    Millard2012EquilibriumMuscle add_mag2_r: optimal_force=1 max_isometric_force=432 optimal_fiber_length=0.1474725
        tendon_slack_length=0.07984179 pennation_angle_at_optimal=0.249 max_contraction_velocity=10
        minimum_activation=0.01
      PathPoint P1: pelvis (-0.08675604 -0.1244443 0.03215507)
      PathPoint P2: femur_r (0.005138436 -0.217432 0.02160046)
    Millard2012EquilibriumMuscle add_mag3_r: optimal_force=1 max_isometric_force=432 optimal_fiber_length=0.1467182
        tendon_slack_length=0.2069104 pennation_angle_at_optimal=0.208 max_contraction_velocity=10
        minimum_activation=0.01
      PathPoint P1: pelvis (-0.115967 -0.1191512 0.05096787)
      PathPoint P2: femur_r (0.006660936 -0.3651144 -0.02531156)
    Millard2012EquilibriumMuscle tfl_r: optimal_force=1 max_isometric_force=233 optimal_fiber_length=0.09308682
        tendon_slack_length=0.4262396 pennation_angle_at_optimal=0.0524 max_contraction_velocity=10
        activation_time_constant=0.01 deactivation_time_constant=0.04 minimum_activation=0.01
      PathPoint P1: pelvis (-0.03246827 0.02234151 0.1295599)
      PathPoint P2: femur_r (0.02797593 -0.09468044 0.05680827)
      PathPoint P3: femur_r (0.005138436 -0.3852876 0.03397077)
      PathPoint P4: tibia_r (0.006648377 -0.05396266 0.03290947)
    Millard2012EquilibriumMuscle pect_r: optimal_force=1 max_isometric_force=266 optimal_fiber_length=0.09761175
        tendon_slack_length=0.02440294 pennation_angle_at_optimal=0 max_contraction_velocity=10 minimum_activation=0.01
      PathPoint P1: pelvis (-0.04499622 -0.08017887 0.04708421)
      PathPoint P2: femur_r (-0.01160906 -0.07821842 0.02407452)
    Millard2012EquilibriumMuscle grac_r: optimal_force=1 max_isometric_force=162 optimal_fiber_length=0.2219658
        tendon_slack_length=0.1831852 pennation_angle_at_optimal=0.1431 max_contraction_velocity=10
        activation_time_constant=0.01 deactivation_time_constant=0.04 minimum_activation=0.01
      PathPoint P1: pelvis (-0.07726612 -0.1239223 0.02916924)
      PathPoint P3: tibia_r (-0.02152966 -0.05709848 -0.03966865)
      PathPoint P4: tibia_r (0.006648377 -0.09263405 -0.02526383)
    Millard2012EquilibriumMuscle glut_max1_r: optimal_force=1 max_isometric_force=573 optimal_fiber_length=0.1492485
        tendon_slack_length=0.1063889 pennation_angle_at_optimal=0.3822 max_contraction_velocity=10
        minimum_activation=0.01
      PathPoint P1: pelvis (-0.1247575 0.06389254 0.0730797)
      PathPoint P2: pelvis (-0.1347798 0.001252795 0.09249802)
      PathPoint P3: femur_r (-0.04348639 -0.02359874 0.03730124)
      PathPoint P4: femur_r (-0.02635827 -0.05385842 0.04472343)
    Millard2012EquilibriumMuscle glut_max2_r: optimal_force=1 max_isometric_force=819 optimal_fiber_length=0.1570916
        tendon_slack_length=0.1111355 pennation_angle_at_optimal=0.3822 max_contraction_velocity=10
        minimum_activation=0.01
      PathPoint P1: pelvis (-0.140835 0.01837432 0.05877696)
      PathPoint P2: pelvis (-0.1436538 -0.05428778 0.09542121)
      PathPoint P3: femur_r (-0.04053655 -0.0504328 0.02788077)
      PathPoint P4: femur_r (-0.01484437 -0.09667872 0.03987046)
    Millard2012EquilibriumMuscle glut_max3_r: optimal_force=1 max_isometric_force=552 optimal_fiber_length=0.1667615
        tendon_slack_length=0.1342104 pennation_angle_at_optimal=0.3822 max_contraction_velocity=10
        minimum_activation=0.01
      PathPoint P1: pelvis (-0.1624457 -0.03278147 0.006055175)
      PathPoint P2: pelvis (-0.1596269 -0.1098283 0.04207303)
      PathPoint P3: femur_r (-0.02845171 -0.09905763 0.01284609)
      PathPoint P4: femur_r (-0.005709373 -0.1350267 0.03910921)
    Millard2012EquilibriumMuscle iliacus_r: optimal_force=1 max_isometric_force=1073 optimal_fiber_length=0.1073181
        tendon_slack_length=0.09312309 pennation_angle_at_optimal=0.2496 max_contraction_velocity=10
        activation_time_constant=0.01 deactivation_time_constant=0.04 minimum_activation=0.01
      PathPoint P1: pelvis (-0.07036531 0.03810584 0.08915723)
      PathPoint P2: pelvis (-0.03131987 -0.01043996 0.08456365)
      PathPoint P4: femur_r (0.02378906 -0.03330468 0.007612498)
      PathPoint P5: femur_r (-0.01836515 -0.05909202 0.01227515)
    Millard2012EquilibriumMuscle psoas_r: optimal_force=1 max_isometric_force=1113 optimal_fiber_length=0.1185546
        tendon_slack_length=0.1571939 pennation_angle_at_optimal=0.1868 max_contraction_velocity=10
        activation_time_constant=0.01 deactivation_time_constant=0.04 minimum_activation=0.01
      PathPoint P1: torso (0.01940627 0.03396097 0.01940627)
      PathPoint P2: pelvis (-0.03131987 -0.01043996 0.0730797)
      PathPoint P4: femur_r (0.02378906 -0.03330468 0.003615937)
      PathPoint P5: femur_r (-0.01788937 -0.05680827 0.009896247)
    Millard2012EquilibriumMuscle quad_fem_r: optimal_force=1 max_isometric_force=381 optimal_fiber_length=0.05466662
        tendon_slack_length=0.02227159 pennation_angle_at_optimal=0 max_contraction_velocity=10 minimum_activation=0.01
      PathPoint P1: pelvis (-0.1193287 -0.1201639 0.05428778)
      PathPoint P2: femur_r (-0.03625452 -0.03416108 0.03482718)
    Millard2012EquilibriumMuscle gem_r: optimal_force=1 max_isometric_force=164 optimal_fiber_length=0.02398578
        tendon_slack_length=0.03797749 pennation_angle_at_optimal=0 max_contraction_velocity=10 minimum_activation=0.01
      PathPoint P1: pelvis (-0.1182847 -0.08560765 0.07454129)
      PathPoint P2: femur_r (-0.01351218 -0.003140155 0.04215421)
    Millard2012EquilibriumMuscle piri_r: optimal_force=1 max_isometric_force=444 optimal_fiber_length=0.02665316
        tendon_slack_length=0.1158387 pennation_angle_at_optimal=0.1745 max_contraction_velocity=10
        minimum_activation=0.01
      PathPoint P1: pelvis (-0.1457418 0.0003131987 0.0245339)
      PathPoint P2: pelvis (-0.1245487 -0.02881428 0.06859052)
      PathPoint P3: femur_r (-0.01408312 -0.003425624 0.04158327)
    Millard2012EquilibriumMuscle rect_fem_r: optimal_force=1 max_isometric_force=1169 optimal_fiber_length=0.07223786
        tendon_slack_length=0.3282587 pennation_angle_at_optimal=0.2426 max_contraction_velocity=10
        minimum_activation=0.01
      PathPoint P1: pelvis (-0.03079787 -0.03246827 0.1010588)
      PathPoint P2: femur_r (0.03615937 -0.3235312 0.003806249)
      PathPoint P3: tibia_r (0.04210639 0.02770157 0.001994513)
    Millard2012EquilibriumMuscle vas_lat_r: optimal_force=1 max_isometric_force=1871 optimal_fiber_length=0.09332099
        tendon_slack_length=0.1295603 pennation_angle_at_optimal=0.3211 max_contraction_velocity=10
        activation_time_constant=0.01 deactivation_time_constant=0.04 minimum_activation=0.01
      PathPoint P1: femur_r (0.004567499 -0.1764196 0.03320952)
      PathPoint P2: femur_r (0.03235312 -0.3235312 0.02179078)
      PathPoint P3: tibia_r (0.04210639 0.02437738 0.01772901)
    Millard2012EquilibriumMuscle vas_int_r: optimal_force=1 max_isometric_force=1365 optimal_fiber_length=0.09271974
        tendon_slack_length=0.1149426 pennation_angle_at_optimal=0.0785 max_contraction_velocity=10
        minimum_activation=0.01
      PathPoint P1: femur_r (0.02759531 -0.1830806 0.02949843)
      PathPoint P2: femur_r (0.03615937 -0.3235312 0.006660936)
      PathPoint P3: tibia_r (0.04210639 0.02770157 0.001994513)
    Millard2012EquilibriumMuscle vas_med_r: optimal_force=1 max_isometric_force=1294 optimal_fiber_length=0.09091948
        tendon_slack_length=0.117876 pennation_angle_at_optimal=0.5166 max_contraction_velocity=10
        activation_time_constant=0.01 deactivation_time_constant=0.04 minimum_activation=0.01
      PathPoint P1: femur_r (0.01332187 -0.1997329 0.01788937)
      PathPoint P2: femur_r (0.03330468 -0.3206765 -0.007612498)
      PathPoint P3: tibia_r (0.04210639 0.02437738 -0.01329675)
    Millard2012EquilibriumMuscle gas_lat_r: optimal_force=1 max_isometric_force=683 optimal_fiber_length=0.06462162
        tendon_slack_length=0.4143257 pennation_angle_at_optimal=0.2094 max_contraction_velocity=10
        activation_time_constant=0.01 deactivation_time_constant=0.04 minimum_activation=0.01
      PathPoint P1: femur_r (-0.01903124 -0.3692062 0.02588249)
      PathPoint P3: calcn_r (0.004466159 0.02769019 -0.004734128)
    Millard2012EquilibriumMuscle gas_med_r: optimal_force=1 max_isometric_force=1558 optimal_fiber_length=0.05604404
        tendon_slack_length=0.4219787 pennation_angle_at_optimal=0.1728 max_contraction_velocity=10
        minimum_activation=0.01
      PathPoint P1: femur_r (-0.01903124 -0.3692062 -0.02283749)
      PathPoint P3: calcn_r (0.004466159 0.02769019 -0.004734128)
    Millard2012EquilibriumMuscle soleus_r: optimal_force=1 max_isometric_force=3549 optimal_fiber_length=0.04822023
        tendon_slack_length=0.2717867 pennation_angle_at_optimal=0.4939 max_contraction_velocity=10
        minimum_activation=0.01
      PathPoint P1: tibia_r (-0.002659351 -0.169866 0.007867246)
      PathPoint P2: calcn_r (0.004466159 0.02769019 -0.004734128)
    Millard2012EquilibriumMuscle tib_post_r: optimal_force=1 max_isometric_force=1588 optimal_fiber_length=0.04086065
        tendon_slack_length=0.3281824 pennation_angle_at_optimal=0.2391 max_contraction_velocity=10
        activation_time_constant=0.01 deactivation_time_constant=0.04 minimum_activation=0.01
      PathPoint P1: tibia_r (-0.01041579 -0.1493669 0.002105319)
      PathPoint P2: tibia_r (-0.0159561 -0.4488763 -0.02537464)
      PathPoint P3: calcn_r (0.03724777 0.02983394 -0.02554643)
      PathPoint P4: calcn_r (0.06895749 0.01420239 -0.02509981)
    Millard2012EquilibriumMuscle tib_ant_r: optimal_force=1 max_isometric_force=1067 optimal_fiber_length=0.07313687
        tendon_slack_length=0.2602088 pennation_angle_at_optimal=0.1676 max_contraction_velocity=10
        activation_time_constant=0.01 deactivation_time_constant=0.04 minimum_activation=0.01
      PathPoint P1: tibia_r (0.01983432 -0.1799494 0.01274272)
      PathPoint P2: tibia_r (0.03645527 -0.4377956 -0.01961271)
      PathPoint P3: calcn_r (0.1041508 0.01589953 -0.02724357)
    Millard2012EquilibriumMuscle per_brev_r: optimal_force=1 max_isometric_force=435 optimal_fiber_length=0.04880326
        tendon_slack_length=0.1787661 pennation_angle_at_optimal=0.2007 max_contraction_velocity=10
        activation_time_constant=0.01 deactivation_time_constant=0.04 minimum_activation=0.01
      PathPoint P1: tibia_r (-0.00775644 -0.2931934 0.03601204)
      PathPoint P2: tibia_r (-0.02193964 -0.4636135 0.03135818)
      PathPoint P3: tibia_r (-0.0159561 -0.475913 0.03202302)
      PathPoint P4: calcn_r (0.04207122 0.02411726 0.0208123)
      PathPoint P5: calcn_r (0.06047179 0.01956178 0.03063785)
    Millard2012EquilibriumMuscle per_long_r: optimal_force=1 max_isometric_force=943 optimal_fiber_length=0.05332678
        tendon_slack_length=0.3611105 pennation_angle_at_optimal=0.2461 max_contraction_velocity=10
        activation_time_constant=0.01 deactivation_time_constant=0.04 minimum_activation=0.01
      PathPoint P1: tibia_r (0.0005540314 -0.1737443 0.04011187)
      PathPoint P2: tibia_r (-0.0229369 -0.4659404 0.0316906)
      PathPoint P3: tibia_r (-0.01795062 -0.4785723 0.03202302)
      PathPoint P4: calcn_r (0.03912355 0.02054433 0.01974042)
      PathPoint P5: calcn_r (0.06082908 0.009468257 0.02536778)
      PathPoint P6: calcn_r (0.07610335 0.006163299 0.01054014)
      PathPoint P7: calcn_r (0.1074558 0.00759247 -0.01643546)
    Millard2012EquilibriumMuscle per_tert_r: optimal_force=1 max_isometric_force=180 optimal_fiber_length=0.08368193
        tendon_slack_length=0.1059265 pennation_angle_at_optimal=0.2269 max_contraction_velocity=10
        activation_time_constant=0.01 deactivation_time_constant=0.04 minimum_activation=0.01
      PathPoint P1: tibia_r (0.001108063 -0.3107008 0.02559625)
      PathPoint P2: tibia_r (0.02537464 -0.4508708 0.0176182)
      PathPoint P3: calcn_r (0.07654996 0.02036568 0.02670763)
    Millard2012EquilibriumMuscle ext_dig_r: optimal_force=1 max_isometric_force=512 optimal_fiber_length=0.07147642
        tendon_slack_length=0.3898714 pennation_angle_at_optimal=0.1885 max_contraction_velocity=10
        activation_time_constant=0.01 deactivation_time_constant=0.04 minimum_activation=0.01
      PathPoint P1: tibia_r (0.003545801 -0.1530235 0.03058253)
      PathPoint P2: tibia_r (0.03202302 -0.4440008 0.007978052)
      PathPoint P3: calcn_r (0.08235597 0.03465739 -8.932318e-5)
      PathPoint P4: calcn_r (0.1443463 0.004912775 0.01161201)
      PathPoint P5: calcn_r (0.1599778 0.002411726 0.01463114)
      PathPoint P6: calcn_r (0.19928 -0.002143756 0.02329548)
    Millard2012EquilibriumMuscle glut_med1_l: optimal_force=1 max_isometric_force=819 optimal_fiber_length=0.07502025
        tendon_slack_length=0.05710955 pennation_angle_at_optimal=0.3578 max_contraction_velocity=10
        minimum_activation=0.01
      PathPoint P1: pelvis (-0.04259503 0.03173747 -0.1262191)
      PathPoint P2: femur_l (-0.02074406 -0.01113328 -0.0528117)
    Millard2012EquilibriumMuscle glut_med2_l: optimal_force=1 max_isometric_force=573 optimal_fiber_length=0.07495644
        tendon_slack_length=0.06667339 pennation_angle_at_optimal=0.3578 max_contraction_velocity=10
        minimum_activation=0.01
      PathPoint P1: pelvis (-0.08926163 0.04645781 -0.07997007)
      PathPoint P2: femur_l (-0.02455031 -0.005519061 -0.05014733)
    Millard2012EquilibriumMuscle glut_med3_l: optimal_force=1 max_isometric_force=653 optimal_fiber_length=0.07467887
        tendon_slack_length=0.04605027 pennation_angle_at_optimal=0.3578 max_contraction_velocity=10
        minimum_activation=0.01
      PathPoint P1: pelvis (-0.1276807 0.01096196 -0.06765092)
      PathPoint P2: femur_l (-0.02940327 -0.004472343 -0.04929092)
    Millard2012EquilibriumMuscle glut_min1_l: optimal_force=1 max_isometric_force=270 optimal_fiber_length=0.0684662
        tendon_slack_length=0.01610969 pennation_angle_at_optimal=0.1745 max_contraction_velocity=10
        minimum_activation=0.01
      PathPoint P1: pelvis (-0.0487546 -0.008351966 -0.1102459)
      PathPoint P2: femur_l (-0.006851248 -0.009896247 -0.05328749)
    Millard2012EquilibriumMuscle glut_min2_l: optimal_force=1 max_isometric_force=285 optimal_fiber_length=0.05613639
        tendon_slack_length=0.02606332 pennation_angle_at_optimal=0 max_contraction_velocity=10 minimum_activation=0.01
      PathPoint P1: pelvis (-0.06608493 -0.006785972 -0.10346)
      PathPoint P2: femur_l (-0.009134998 -0.009896247 -0.05328749)
    Millard2012EquilibriumMuscle glut_min3_l: optimal_force=1 max_isometric_force=323 optimal_fiber_length=0.03806137
        tendon_slack_length=0.04807752 pennation_angle_at_optimal=0.0175 max_contraction_velocity=10
        minimum_activation=0.01
      PathPoint P1: pelvis (-0.08706924 -0.006577173 -0.08936603)
      PathPoint P2: femur_l (-0.01284609 -0.007897967 -0.05233592)
    Millard2012EquilibriumMuscle semimem_l: optimal_force=1 max_isometric_force=1288 optimal_fiber_length=0.06600365
        tendon_slack_length=0.3204525 pennation_angle_at_optimal=0.2635 max_contraction_velocity=10
        activation_time_constant=0.01 deactivation_time_constant=0.04 minimum_activation=0.01
      PathPoint P1: pelvis (-0.1244443 -0.1017583 -0.07465613)
      PathPoint P3: tibia_l (-0.03324189 -0.03434995 0.02216126)
    Millard2012EquilibriumMuscle semiten_l: optimal_force=1 max_isometric_force=410 optimal_fiber_length=0.1889446
        tendon_slack_length=0.2496419 pennation_angle_at_optimal=0.2251 max_contraction_velocity=10
        activation_time_constant=0.01 deactivation_time_constant=0.04 minimum_activation=0.01
      PathPoint P1: pelvis (-0.1319089 -0.1147142 -0.0630469)
      PathPoint P3: tibia_l (-0.03656607 -0.04210639 0.02548545)
      PathPoint P4: tibia_l (-0.01252111 -0.08266149 0.02714754)
      PathPoint P5: tibia_l (0.00299177 -0.1059308 0.02138561)
    Millard2012EquilibriumMuscle bifemlh_l: optimal_force=1 max_isometric_force=896 optimal_fiber_length=0.09382123
        tendon_slack_length=0.3066493 pennation_angle_at_optimal=0.2025 max_contraction_velocity=10
        minimum_activation=0.01
      PathPoint P1: pelvis (-0.1315017 -0.1070826 -0.07249506)
      PathPoint P2: tibia_l (-0.03102576 -0.02216126 -0.03261029)
      PathPoint P3: tibia_l (-0.02326932 -0.04432251 -0.03800656)
    Millard2012EquilibriumMuscle bifemsh_l: optimal_force=1 max_isometric_force=804 optimal_fiber_length=0.1085198
        tendon_slack_length=0.09346674 pennation_angle_at_optimal=0.2147 max_contraction_velocity=10
        minimum_activation=0.01
      PathPoint P1: femur_l (0.004757811 -0.2008748 -0.02226656)
      PathPoint P2: tibia_l (-0.03102576 -0.02216126 -0.03261029)
      PathPoint P3: tibia_l (-0.02326932 -0.04432251 -0.03800656)
    Millard2012EquilibriumMuscle sar_l: optimal_force=1 max_isometric_force=156 optimal_fiber_length=0.3993595
        tendon_slack_length=0.1348705 pennation_angle_at_optimal=0.0227 max_contraction_velocity=10
        activation_time_constant=0.01 deactivation_time_constant=0.04 minimum_activation=0.01
      PathPoint P1: pelvis (-0.01597313 -0.001357194 -0.1296643)
      PathPoint P2: femur_l (-0.002854687 -0.3395174 0.04006077)
      PathPoint P3: tibia_l (-0.006205152 -0.04642783 0.04421171)
      PathPoint P4: tibia_l (0.006648377 -0.0652649 0.04243881)
      PathPoint P5: tibia_l (0.02692593 -0.09307728 0.02792318)
    Millard2012EquilibriumMuscle add_long_l: optimal_force=1 max_isometric_force=627 optimal_fiber_length=0.1038631
        tendon_slack_length=0.1017513 pennation_angle_at_optimal=0.1239 max_contraction_velocity=10
        minimum_activation=0.01
      PathPoint P1: pelvis (-0.03299026 -0.08727804 -0.01764353)
      PathPoint P2: femur_l (0.004757811 -0.2008748 -0.02226656)
    Millard2012EquilibriumMuscle add_brev_l: optimal_force=1 max_isometric_force=429 optimal_fiber_length=0.1004071
        tendon_slack_length=0.03408583 pennation_angle_at_optimal=0.1065 max_contraction_velocity=10
        minimum_activation=0.01
      PathPoint P1: pelvis (-0.06128255 -0.09552561 -0.01712153)
      PathPoint P2: femur_l (0.000856406 -0.1138068 -0.02797593)
    Millard2012EquilibriumMuscle add_mag1_l: optimal_force=1 max_isometric_force=432 optimal_fiber_length=0.1226294
        tendon_slack_length=0.02993316 pennation_angle_at_optimal=0.322 max_contraction_velocity=10
        minimum_activation=0.01
      PathPoint P1: pelvis (-0.07642049 -0.1225651 -0.02662189)
      PathPoint P2: femur_l (-0.00428203 -0.1152342 -0.03225796)
    Millard2012EquilibriumMuscle add_mag2_l: optimal_force=1 max_isometric_force=432 optimal_fiber_length=0.1474725
        tendon_slack_length=0.07984179 pennation_angle_at_optimal=0.249 max_contraction_velocity=10
        minimum_activation=0.01
      PathPoint P1: pelvis (-0.08675604 -0.1244443 -0.03215507)
      PathPoint P2: femur_l (0.005138436 -0.217432 -0.02160046)
    Millard2012EquilibriumMuscle add_mag3_l: optimal_force=1 max_isometric_force=432 optimal_fiber_length=0.1467182
        tendon_slack_length=0.2069104 pennation_angle_at_optimal=0.208 max_contraction_velocity=10
        minimum_activation=0.01
      PathPoint P1: pelvis (-0.115967 -0.1191512 -0.05096787)
      PathPoint P2: femur_l (0.006660936 -0.3651144 0.02531156)
    Millard2012EquilibriumMuscle tfl_l: optimal_force=1 max_isometric_force=233 optimal_fiber_length=0.09308682
        tendon_slack_length=0.4262396 pennation_angle_at_optimal=0.0524 max_contraction_velocity=10
        activation_time_constant=0.01 deactivation_time_constant=0.04 minimum_activation=0.01
      PathPoint P1: pelvis (-0.03246827 0.02234151 -0.1295599)
      PathPoint P2: femur_l (0.02797593 -0.09468044 -0.05680827)
      PathPoint P3: femur_l (0.005138436 -0.3852876 -0.03397077)
      PathPoint P4: tibia_l (0.006648377 -0.05396266 -0.03290947)
    Millard2012EquilibriumMuscle pect_l: optimal_force=1 max_isometric_force=266 optimal_fiber_length=0.09761175
        tendon_slack_length=0.02440294 pennation_angle_at_optimal=0 max_contraction_velocity=10 minimum_activation=0.01
      PathPoint P1: pelvis (-0.04499622 -0.08017887 -0.04708421)
      PathPoint P2: femur_l (-0.01160906 -0.07821842 -0.02407452)
    Millard2012EquilibriumMuscle grac_l: optimal_force=1 max_isometric_force=162 optimal_fiber_length=0.2219658
        tendon_slack_length=0.1831852 pennation_angle_at_optimal=0.1431 max_contraction_velocity=10
        activation_time_constant=0.01 deactivation_time_constant=0.04 minimum_activation=0.01
      PathPoint P1: pelvis (-0.07726612 -0.1239223 -0.02916924)
      PathPoint P3: tibia_l (-0.02152966 -0.05709848 0.03966865)
      PathPoint P4: tibia_l (0.006648377 -0.09263405 0.02526383)
    Millard2012EquilibriumMuscle glut_max1_l: optimal_force=1 max_isometric_force=573 optimal_fiber_length=0.1492485
        tendon_slack_length=0.1063889 pennation_angle_at_optimal=0.3822 max_contraction_velocity=10
        minimum_activation=0.01
      PathPoint P1: pelvis (-0.1247575 0.06389254 -0.0730797)
      PathPoint P2: pelvis (-0.1347798 0.001252795 -0.09249802)
      PathPoint P3: femur_l (-0.04348639 -0.02359874 -0.03730124)
      PathPoint P4: femur_l (-0.02635827 -0.05385842 -0.04472343)
    Millard2012EquilibriumMuscle glut_max2_l: optimal_force=1 max_isometric_force=819 optimal_fiber_length=0.1570916
        tendon_slack_length=0.1111355 pennation_angle_at_optimal=0.3822 max_contraction_velocity=10
        minimum_activation=0.01
      PathPoint P1: pelvis (-0.140835 0.01837432 -0.05877696)
      PathPoint P2: pelvis (-0.1436538 -0.05428778 -0.09542121)
      PathPoint P3: femur_l (-0.04053655 -0.0504328 -0.02788077)
      PathPoint P4: femur_l (-0.01484437 -0.09667872 -0.03987046)
    Millard2012EquilibriumMuscle glut_max3_l: optimal_force=1 max_isometric_force=552 optimal_fiber_length=0.1667615
        tendon_slack_length=0.1342104 pennation_angle_at_optimal=0.3822 max_contraction_velocity=10
        minimum_activation=0.01
      PathPoint P1: pelvis (-0.1624457 -0.03278147 -0.006055175)
      PathPoint P2: pelvis (-0.1596269 -0.1098283 -0.04207303)
      PathPoint P3: femur_l (-0.02845171 -0.09905763 -0.01284609)
      PathPoint P4: femur_l (-0.005709373 -0.1350267 -0.03910921)
    Millard2012EquilibriumMuscle iliacus_l: optimal_force=1 max_isometric_force=1073 optimal_fiber_length=0.1073181
        tendon_slack_length=0.09312309 pennation_angle_at_optimal=0.2496 max_contraction_velocity=10
        activation_time_constant=0.01 deactivation_time_constant=0.04 minimum_activation=0.01
      PathPoint P1: pelvis (-0.07036531 0.03810584 -0.08915723)
      PathPoint P2: pelvis (-0.03131987 -0.01043996 -0.08456365)
      PathPoint P4: femur_l (0.02378906 -0.03330468 -0.007612498)
      PathPoint P5: femur_l (-0.01836515 -0.05909202 -0.01227515)
    Millard2012EquilibriumMuscle psoas_l: optimal_force=1 max_isometric_force=1113 optimal_fiber_length=0.1185546
        tendon_slack_length=0.1571939 pennation_angle_at_optimal=0.1868 max_contraction_velocity=10
        activation_time_constant=0.01 deactivation_time_constant=0.04 minimum_activation=0.01
      PathPoint P1: torso (0.01940627 0.03396097 -0.01940627)
      PathPoint P2: pelvis (-0.03131987 -0.01043996 -0.0730797)
      PathPoint P4: femur_l (0.02378906 -0.03330468 -0.003615937)
      PathPoint P5: femur_l (-0.01788937 -0.05680827 -0.009896247)
    Millard2012EquilibriumMuscle quad_fem_l: optimal_force=1 max_isometric_force=381 optimal_fiber_length=0.05466662
        tendon_slack_length=0.02227159 pennation_angle_at_optimal=0 max_contraction_velocity=10 minimum_activation=0.01
      PathPoint P1: pelvis (-0.1193287 -0.1201639 -0.05428778)
      PathPoint P2: femur_l (-0.03625452 -0.03416108 -0.03482718)
    Millard2012EquilibriumMuscle gem_l: optimal_force=1 max_isometric_force=164 optimal_fiber_length=0.02398578
        tendon_slack_length=0.03797749 pennation_angle_at_optimal=0 max_contraction_velocity=10 minimum_activation=0.01
      PathPoint P1: pelvis (-0.1182847 -0.08560765 -0.07454129)
      PathPoint P2: femur_l (-0.01351218 -0.003140155 -0.04215421)
    Millard2012EquilibriumMuscle piri_l: optimal_force=1 max_isometric_force=444 optimal_fiber_length=0.02665316
        tendon_slack_length=0.1158387 pennation_angle_at_optimal=0.1745 max_contraction_velocity=10
        minimum_activation=0.01
      PathPoint P1: pelvis (-0.1457418 0.0003131987 -0.0245339)
      PathPoint P2: pelvis (-0.1245487 -0.02881428 -0.06859052)
      PathPoint P3: femur_l (-0.01408312 -0.003425624 -0.04158327)
    Millard2012EquilibriumMuscle rect_fem_l: optimal_force=1 max_isometric_force=1169 optimal_fiber_length=0.07223786
        tendon_slack_length=0.3282587 pennation_angle_at_optimal=0.2426 max_contraction_velocity=10
        minimum_activation=0.01
      PathPoint P1: pelvis (-0.03079787 -0.03246827 -0.1010588)
      PathPoint P2: femur_l (0.03615937 -0.3235312 -0.003806249)
      PathPoint P3: tibia_l (0.04210639 0.02770157 -0.001994513)
    Millard2012EquilibriumMuscle vas_lat_l: optimal_force=1 max_isometric_force=1871 optimal_fiber_length=0.09332099
        tendon_slack_length=0.1295603 pennation_angle_at_optimal=0.3211 max_contraction_velocity=10
        activation_time_constant=0.01 deactivation_time_constant=0.04 minimum_activation=0.01
      PathPoint P1: femur_l (0.004567499 -0.1764196 -0.03320952)
      PathPoint P2: femur_l (0.03235312 -0.3235312 -0.02179078)
      PathPoint P3: tibia_l (0.04210639 0.02437738 -0.01772901)
    Millard2012EquilibriumMuscle vas_int_l: optimal_force=1 max_isometric_force=1365 optimal_fiber_length=0.09271974
        tendon_slack_length=0.1149426 pennation_angle_at_optimal=0.0785 max_contraction_velocity=10
        minimum_activation=0.01
      PathPoint P1: femur_l (0.02759531 -0.1830806 -0.02949843)
      PathPoint P2: femur_l (0.03615937 -0.3235312 -0.006660936)
      PathPoint P3: tibia_l (0.04210639 0.02770157 -0.001994513)
    Millard2012EquilibriumMuscle vas_med_l: optimal_force=1 max_isometric_force=1294 optimal_fiber_length=0.09091948
        tendon_slack_length=0.117876 pennation_angle_at_optimal=0.5166 max_contraction_velocity=10
        activation_time_constant=0.01 deactivation_time_constant=0.04 minimum_activation=0.01
      PathPoint P1: femur_l (0.01332187 -0.1997329 -0.01788937)
      PathPoint P2: femur_l (0.03330468 -0.3206765 0.007612498)
      PathPoint P3: tibia_l (0.04210639 0.02437738 0.01329675)
    Millard2012EquilibriumMuscle gas_lat_l: optimal_force=1 max_isometric_force=683 optimal_fiber_length=0.06462162
        tendon_slack_length=0.4143257 pennation_angle_at_optimal=0.2094 max_contraction_velocity=10
        activation_time_constant=0.01 deactivation_time_constant=0.04 minimum_activation=0.01
      PathPoint P1: femur_l (-0.01903124 -0.3692062 -0.02588249)
      PathPoint P3: calcn_l (0.004466159 0.02769019 0.004734128)
    Millard2012EquilibriumMuscle gas_med_l: optimal_force=1 max_isometric_force=1558 optimal_fiber_length=0.05604404
        tendon_slack_length=0.4219787 pennation_angle_at_optimal=0.1728 max_contraction_velocity=10
        minimum_activation=0.01
      PathPoint P1: femur_l (-0.01903124 -0.3692062 0.02283749)
      PathPoint P3: calcn_l (0.004466159 0.02769019 0.004734128)
    Millard2012EquilibriumMuscle soleus_l: optimal_force=1 max_isometric_force=3549 optimal_fiber_length=0.04822023
        tendon_slack_length=0.2717867 pennation_angle_at_optimal=0.4939 max_contraction_velocity=10
        minimum_activation=0.01
      PathPoint P1: tibia_l (-0.002659351 -0.169866 -0.007867246)
      PathPoint P2: calcn_l (0.004466159 0.02769019 0.004734128)
    Millard2012EquilibriumMuscle tib_post_l: optimal_force=1 max_isometric_force=1588 optimal_fiber_length=0.04086065
        tendon_slack_length=0.3281824 pennation_angle_at_optimal=0.2391 max_contraction_velocity=10
        activation_time_constant=0.01 deactivation_time_constant=0.04 minimum_activation=0.01
      PathPoint P1: tibia_l (-0.01041579 -0.1493669 -0.002105319)
      PathPoint P2: tibia_l (-0.0159561 -0.4488763 0.02537464)
      PathPoint P3: calcn_l (0.03724777 0.02983394 0.02554643)
      PathPoint P4: calcn_l (0.06895749 0.01420239 0.02509981)
    Millard2012EquilibriumMuscle tib_ant_l: optimal_force=1 max_isometric_force=1067 optimal_fiber_length=0.07313687
        tendon_slack_length=0.2602088 pennation_angle_at_optimal=0.1676 max_contraction_velocity=10
        activation_time_constant=0.01 deactivation_time_constant=0.04 minimum_activation=0.01
      PathPoint P1: tibia_l (0.01983432 -0.1799494 -0.01274272)
      PathPoint P2: tibia_l (0.03645527 -0.4377956 0.01961271)
      PathPoint P3: calcn_l (0.1041508 0.01589953 0.02724357)
    Millard2012EquilibriumMuscle per_brev_l: optimal_force=1 max_isometric_force=435 optimal_fiber_length=0.04880326
        tendon_slack_length=0.1787661 pennation_angle_at_optimal=0.2007 max_contraction_velocity=10
        activation_time_constant=0.01 deactivation_time_constant=0.04 minimum_activation=0.01
      PathPoint P1: tibia_l (-0.00775644 -0.2931934 -0.03601204)
      PathPoint P2: tibia_l (-0.02193964 -0.4636135 -0.03135818)
      PathPoint P3: tibia_l (-0.0159561 -0.475913 -0.03202302)
      PathPoint P4: calcn_l (0.04207122 0.02411726 -0.0208123)
      PathPoint P5: calcn_l (0.06047179 0.01956178 -0.03063785)
    Millard2012EquilibriumMuscle per_long_l: optimal_force=1 max_isometric_force=943 optimal_fiber_length=0.05332678
        tendon_slack_length=0.3611105 pennation_angle_at_optimal=0.2461 max_contraction_velocity=10
        activation_time_constant=0.01 deactivation_time_constant=0.04 minimum_activation=0.01
      PathPoint P1: tibia_l (0.0005540314 -0.1737443 -0.04011187)
      PathPoint P2: tibia_l (-0.0229369 -0.4659404 -0.0316906)
      PathPoint P3: tibia_l (-0.01795062 -0.4785723 -0.03202302)
      PathPoint P4: calcn_l (0.03912355 0.02054433 -0.01974042)
      PathPoint P5: calcn_l (0.06082908 0.009468257 -0.02536778)
      PathPoint P6: calcn_l (0.07610335 0.006163299 -0.01054014)
      PathPoint P7: calcn_l (0.1074558 0.00759247 0.01643546)
    Millard2012EquilibriumMuscle per_tert_l: optimal_force=1 max_isometric_force=180 optimal_fiber_length=0.08368193
        tendon_slack_length=0.1059265 pennation_angle_at_optimal=0.2269 max_contraction_velocity=10
        activation_time_constant=0.01 deactivation_time_constant=0.04 minimum_activation=0.01
      PathPoint P1: tibia_l (0.001108063 -0.3107008 -0.02559625)
      PathPoint P2: tibia_l (0.02537464 -0.4508708 -0.0176182)
      PathPoint P3: calcn_l (0.07654996 0.02036568 -0.02670763)
    Millard2012EquilibriumMuscle ext_dig_l: optimal_force=1 max_isometric_force=512 optimal_fiber_length=0.07147642
        tendon_slack_length=0.3898714 pennation_angle_at_optimal=0.1885 max_contraction_velocity=10
        activation_time_constant=0.01 deactivation_time_constant=0.04 minimum_activation=0.01
      PathPoint P1: tibia_l (0.003545801 -0.1530235 -0.03058253)
      PathPoint P2: tibia_l (0.03202302 -0.4440008 -0.007978052)
      PathPoint P3: calcn_l (0.08235597 0.03465739 8.932318e-5)
      PathPoint P4: calcn_l (0.1443463 0.004912775 -0.01161201)
      PathPoint P5: calcn_l (0.1599778 0.002411726 -0.01463114)
      PathPoint P6: calcn_l (0.19928 -0.002143756 -0.02329548)
    Millard2012EquilibriumMuscle int_obl_r: optimal_force=1 max_isometric_force=900 optimal_fiber_length=0.09954753
        tendon_slack_length=0.09954753 pennation_angle_at_optimal=0 max_contraction_velocity=10
        activation_time_constant=0.01 deactivation_time_constant=0.04 minimum_activation=0.01
      PathPoint intobl_r-P1: pelvis (-0.04175983 0.0730797 0.1207903)
      PathPoint intobl_r-P2: torso (0.06792195 0.1552502 0.0145547)
    Millard2012EquilibriumMuscle ext_obl_r: optimal_force=1 max_isometric_force=900 optimal_fiber_length=0.1207614
        tendon_slack_length=0.1408883 pennation_angle_at_optimal=0 max_contraction_velocity=10
        activation_time_constant=0.01 deactivation_time_constant=0.04 minimum_activation=0.01
      PathPoint extobl_r-P1: pelvis (-0.03131987 -0.06639813 0.01043996)
      PathPoint extobl_r-P2: torso (0.06307038 0.1067345 0.1067345)
    Millard2012EquilibriumMuscle erec_sp_r: optimal_force=1 max_isometric_force=2304 optimal_fiber_length=0.06793875
        tendon_slack_length=0.07892884 pennation_angle_at_optimal=0.22 max_contraction_velocity=10
        activation_time_constant=0.01 deactivation_time_constant=0.04 minimum_activation=0.01
      PathPoint P1: pelvis (-0.1461594 0.04593581 0.05324378)
      PathPoint P2: pelvis (-0.1409394 0.08769564 0.04384782)
      PathPoint P3: torso (-0.02716878 0.08829853 0.0213469)
    Millard2012EquilibriumMuscle quad_lumb_r: max_isometric_force=537 optimal_fiber_length=0.0973319
        tendon_slack_length=0.06521237 minimum_activation=0.01
      PathPoint P1: pelvis (-0.1158835 0.08351966 0.06785972)
      PathPoint P2: torso (-0.04851568 0.1406955 0.04851568)
    Millard2012EquilibriumMuscle rect_abd_r: max_isometric_force=466 optimal_fiber_length=0.3327743
        tendon_slack_length=0.08194442 minimum_activation=0.01
      PathPoint RA_pelvis_r: pelvis (-0.02609989 -0.07516769 0.0240119)
      PathPoint RA_pelvis_r_0: pelvis (-0.003131987 0.02087991 0.02714389)
      PathPoint RA_torso_r: torso (0.09703136 0.1746564 0.02619847)
      PathPoint RA_torso_r_0: torso (0.08247665 0.2328753 0.02716878)
    Millard2012EquilibriumMuscle int_obl_l: optimal_force=1 max_isometric_force=900 optimal_fiber_length=0.09954753
        tendon_slack_length=0.09954753 pennation_angle_at_optimal=0 max_contraction_velocity=10
        activation_time_constant=0.01 deactivation_time_constant=0.04 minimum_activation=0.01
      PathPoint intobl_l-P1: pelvis (-0.04175983 0.0730797 -0.1207903)
      PathPoint intobl_l-P2: torso (0.06792195 0.1552502 -0.0145547)
    Millard2012EquilibriumMuscle ext_obl_l: optimal_force=1 max_isometric_force=900 optimal_fiber_length=0.1207614
        tendon_slack_length=0.1408883 pennation_angle_at_optimal=0 max_contraction_velocity=10
        activation_time_constant=0.01 deactivation_time_constant=0.04 minimum_activation=0.01
      PathPoint extobl_l-P1: pelvis (-0.03131987 -0.06639813 -0.01043996)
      PathPoint extobl_l-P2: torso (0.06307038 0.1067345 -0.1067345)
    Millard2012EquilibriumMuscle erec_sp_l: optimal_force=1 max_isometric_force=2304 optimal_fiber_length=0.06793875
        tendon_slack_length=0.07892884 pennation_angle_at_optimal=0.22 max_contraction_velocity=10
        activation_time_constant=0.01 deactivation_time_constant=0.04 minimum_activation=0.01
      PathPoint P1: pelvis (-0.1461594 0.04593581 -0.05324378)
      PathPoint P2: pelvis (-0.1409394 0.08769564 -0.04384782)
      PathPoint P3: torso (-0.02716878 0.08829853 -0.0213469)
    Millard2012EquilibriumMuscle quad_lumb_l: max_isometric_force=537 optimal_fiber_length=0.0973319
        tendon_slack_length=0.06521237 minimum_activation=0.01
      PathPoint P1: pelvis (-0.1158835 0.08351966 -0.06785972)
      PathPoint P2: torso (-0.04851568 0.1406955 -0.04851568)
    Millard2012EquilibriumMuscle rect_abd_l: max_isometric_force=466 optimal_fiber_length=0.3327743
        tendon_slack_length=0.08194442 minimum_activation=0.01
      PathPoint RA_pelvis_l: pelvis (-0.02609989 -0.07516769 -0.0240119)
      PathPoint RA_pelvis_l_0: pelvis (-0.003131987 0.02087991 -0.02714389)
      PathPoint RA_torso_l: torso (0.09703136 0.1746564 -0.02619847)
      PathPoint RA_torso_l_0: torso (0.08247665 0.2328753 -0.02716878)
    CoordinateLimitForce KneeLimit_r: coordinate=knee_angle_r upper_stiffness=8.726646 [N*m/degree]
        upper_limit=0 [degrees] lower_stiffness=8.726646 [N*m/degree] lower_limit=-120 [degrees] damping=1
        transition=0.01 [degrees]
    CoordinateLimitForce KneeLimit_l: coordinate=knee_angle_l upper_stiffness=8.726646 upper_limit=0
        lower_stiffness=8.726646 lower_limit=-120 damping=1 transition=0.01
  MarkerSet:
    Marker RSHO: torso (-0.03866791 0.3983713 0.1770025)
    Marker LSHO: torso (-0.03201194 0.4062788 -0.173055)
    Marker C7: torso (-0.1136748 0.42852 0.002565047)
    Marker CLAV: torso (0.07545018 0.3626153 -0.001360549)
    Marker RASI: pelvis (0.009573487 0.01546249 0.1340392)
    Marker LASI: pelvis (0.009835485 0.02567004 -0.1339978)
    Marker RPSI: pelvis (-0.1906927 0.05709572 0.09311445)
    Marker LPSI: pelvis (-0.2119161 0.06148378 -0.08294509)
    Marker RTHI: femur_r (0.03953428 -0.1120301 0.0747627)
    Marker RKNE: femur_r (-0.001798554 -0.3806773 0.04841112)
    Marker RTIP: tibia_r (-0.002623426 -0.1276595 0.05618946)
    Marker RANK: tibia_r (-0.007468185 -0.48695 0.0580618)
    Marker RHEE: calcn_r (-0.01845525 0.02920704 -0.001092294)
    Marker RMT1: calcn_r (0.1823312 0.02761721 -0.03966794)
    Marker RMT5: calcn_r (0.1598103 0.02718762 0.05552231)
    Marker LTHI: femur_l (-0.008709481 -0.2504445 -0.08213249)
    Marker LKNE: femur_l (0.00195595 -0.3919066 -0.04268669)
    Marker LTIP: tibia_l (-0.002172084 -0.264239 -0.0649637)
    Marker LANK: tibia_l (-0.00674029 -0.4843276 -0.05890847)
    Marker LHEE: calcn_l (-0.01665719 0.02845579 0.02442055)
    Marker LMT1: calcn_l (0.1917797 0.03068112 0.006620191)
    Marker LMT5: calcn_l (0.1375669 0.02086748 -0.09085612)
